# OpenSim document version 40000
Model minimal:
  Ground
  BodySet:
    Body pelvis: meshes=(sacrum.vtp ilium.vtp)
      # FrameGeometry must be ignored: it carries no mesh_file.
      # Geometry attached via the body's own components: a
      # PhysicalOffsetFrame with its own mesh + local offset.
      # Frame without a Mesh: must be skipped.
      PhysicalOffsetFrame pelvis_no_mesh_frame: socket_parent=.. translation=(0 0 0)
      # Noise: a wrap object living inside the body.
      WrapCylinder pelvis_wrap: socket_frame=/bodyset/pelvis radius=0.04
    Body femur_r: meshes=(femur_r.vtp femur_cap_r.vtp)
      # A body may carry several meshes.
    Body tibia_r: meshes=tibia_r.vtp
  JointSet:
    # Bare offset-frame names in the sockets.
    CustomJoint ground_pelvis: socket_parent_frame=ground_offset socket_child_frame=pelvis_offset
      Coordinate pelvis_tilt
      Coordinate pelvis_tx
      Coordinate pelvis_ty
      PhysicalOffsetFrame ground_offset: socket_parent=/ground translation=(0 0 0)
      PhysicalOffsetFrame pelvis_offset: socket_parent=/bodyset/pelvis translation=(0 0 0)
    # Path-form sockets: the parser must take the last segment.
    CustomJoint hip_r: socket_parent_frame=/jointset/hip_r/hip_pelvis_offset
        socket_child_frame=/jointset/hip_r/femur_r_offset
      Coordinate hip_flexion_r
      Coordinate hip_adduction_r
      Coordinate hip_rotation_r
      PhysicalOffsetFrame hip_pelvis_offset: socket_parent=/bodyset/pelvis translation=(-0.07 -0.06 0.08)
      PhysicalOffsetFrame femur_r_offset: socket_parent=/bodyset/femur_r translation=(0 0 0)
  MarkerSet:
    Marker RASIS: pelvis (0.01 -0.02 0.03)
    Marker RKNE: femur_r (0 -0.4 0.05)
  # NOISE: a tiny ForceSet whose muscle path points carry their own
  # socket_parent_frame tags. A global tag search would wrongly pick
  # these up; strict per-set scoping must ignore them entirely.
  ForceSet:
    Thelen2003Muscle soleus_r:
      PathPoint P1: tibia_r (0 0 0)
      PathPoint P2: femur_r (0 0 0)
      PathWrap wrap_soleus: wrap_object=pelvis_wrap
